units real
atom_style atomic
boundary p p p
plugin load ./compute_dseams.so
read_data water.data
mass 1 18.015
pair_style zero 4.0
pair_coeff * *
neighbor 2.0 bin
neigh_modify delay 0 every 1 check yes
compute ice all dseams
dump 1 all custom 1 dump.chill id type x y z c_ice
run 0
